// SBML level 2 version 3

function H(X)
  piecewise(1, X > 0, 0);
end

model rsif20110378supp2_biopepa()

  // Compartments:
  compartment ;
  compartment main = 1;

  // Species:
  substanceOnly species GI_ZTL in main = floor(0.323*omega); GI_ZTL is "GI:ZTL";  // substance in item
  substanceOnly species GI_mRNA in main = floor(0.119*omega);  // substance in item
  substanceOnly species GI_prot in main = floor(0.119*omega);  // substance in item
  substanceOnly species LHY_mRNA in main = floor(1*omega);  // substance in item
  substanceOnly species LHY_prot in main = floor(0.416*omega);  // substance in item
  substanceOnly species LHY_prot_modif in main = floor(0.054*omega);  // substance in item
  substanceOnly species P in main = floor(0.825*omega);  // substance in item
  substanceOnly species PRR5_NI_mRNA in main = floor(0.044*omega);  // substance in item
  substanceOnly species PRR5_NI_prot in main = floor(0.044*omega);  // substance in item
  substanceOnly species PRR7_mRNA in main = floor(0.056*omega);  // substance in item
  substanceOnly species PRR7_prot in main = floor(0.019*omega);  // substance in item
  substanceOnly species PRR9_mRNA in main = floor(0.35*omega);  // substance in item
  substanceOnly species PRR9_prot in main = floor(0.056*omega);  // substance in item
  substanceOnly species TOC1_mRNA in main = floor(0.054*omega);  // substance in item
  substanceOnly species TOC1_prot in main = floor(0.393*omega);  // substance in item
  substanceOnly species TOC1_prot_modif in main = floor(0.393*omega);  // substance in item
  substanceOnly species Y_mRNA in main = floor(0.093*omega);  // substance in item
  substanceOnly species Y_prot in main = floor(0.1*omega);  // substance in item
  substanceOnly species ZTL in main = floor(0.323*omega);  // substance in item

  // Parameters:
  p13 = 0.4;
  _LD_entrainment = 1;
  period = 24;
  dusk_entrainment = 12;
  entrainment_time = 24*entrainment_cycles;
  entrainment_cycles = 100;
  _LD_entrainment_skeleton = 0;
  dusk1_entrainment_skeleton = 3;
  dawn2_entrainment_skeleton = 9;
  dusk2_entrainment_skeleton = 12;
  _DD_observation = 0;
  _LL_observation = 1;
  _LD_observation = 0;
  dusk_observation = 12;
  _LD_observation_skeleton = 0;
  dusk1_observation_skeleton = 3;
  dawn2_observation_skeleton = 12;
  dusk2_observation_skeleton = 15;
  p12 = 30;
  omega = 100;
  m19 = 0.2;
  m18 = 1;
  q4 = 0.6;
  g14 = 0.17;
  n = 1;
  g15 = 0.4;
  o = 2;
  n12 = 2.3;
  p11 = 0.23;
  m3 = 0.2;
  m1 = 0.54;
  m2 = 0.24;
  g1 = 0.1;
  a = 2;
  n0 = 0.4;
  q1 = 0.8;
  n1 = 1.8;
  b = 3;
  g2 = 0.28;
  p3 = 0.1;
  c = 3;
  g3 = 0.4;
  p1 = 0.4;
  p2 = 0.27;
  m4 = 0.2;
  m17 = 0.3;
  m24 = 0.405;
  m16 = 0.5;
  n10 = 0.18;
  l = 2;
  g12 = 0.5;
  n11 = 0.71;
  m = 2;
  g13 = 0.6;
  p10 = 0.36;
  m15 = 0.31;
  m23 = 1;
  m14 = 0.28;
  n8 = 0.42;
  j = 3;
  g10 = 0.7;
  n9 = 0.26;
  k = 3;
  g11 = 0.7;
  p9 = 0.4;
  m13 = 0.32;
  m22 = 2;
  m12 = 1;
  q3 = 2.9;
  g8 = 0.14;
  h = 2;
  n4 = 0;
  n7 = 0.2;
  i = 3;
  g9 = 0.3;
  p8 = 0.7;
  m11 = 1;
  p7 = 0.3;
  m6 = 0.25;
  m7 = 0.5;
  p5 = 1;
  m8 = 0.1;
  m5 = 0.3;
  n2 = 0.7;
  d = 2.5;
  g4 = 0.91;
  n3 = 0.06;
  g5 = 0.3;
  e = 2;
  p15 = 0.05;
  f = 3;
  g6 = 0.3;
  p4 = 0.268;
  m25 = 0.28;
  m26 = 0.14;
  m10 = 0.3;
  m9 = 1;
  q2 = 0.5;
  g7 = 0.18;
  s = 3;
  g16 = 0.2;
  g = 2;
  n5 = 3.4;
  n6 = 1.25;
  p6 = 0.436;
  m21 = 0.2;
  m20 = 1.2;
  p14 = 0.45;

  // Assignment rules:
  light_entrainment := _LD_entrainment*0.5*(1 + tanh((time - period*floor(time/period))/0.5) - (1 + tanh((time - period*floor(time/period) - dusk_entrainment)/0.5)) + 1 + tanh((time - period*floor(time/period) - period)/0.5));
  light_entrainment_skeleton := _LD_entrainment_skeleton*0.5*(1 + tanh((time - period*floor(time/period))/0.5) - (1 + tanh((time - period*floor(time/period) - dusk1_entrainment_skeleton)/0.5)) + 1 + tanh((time - period*floor(time/period) - dawn2_entrainment_skeleton)/0.5) - (1 + tanh((time - period*floor(time/period) - dusk2_entrainment_skeleton)/0.5)) + 1 + tanh((time - period*floor(time/period) - period)/0.5));
  light_observation := _DD_observation*0*H(time + 1) + _LL_observation*1*H(time + 1) + _LD_observation*0.5*(1 + tanh((time - period*floor(time/period))/0.5) - (1 + tanh((time - period*floor(time/period) - dusk_observation)/0.5)) + 1 + tanh((time - period*floor(time/period) - period)/0.5));
  light_observation_skeleton := _LD_observation_skeleton*0.5*(1 + tanh((time - period*floor(time/period))/0.5) - (1 + tanh((time - period*floor(time/period) - dusk1_observation_skeleton)/0.5)) + 1 + tanh((time - period*floor(time/period) - dawn2_observation_skeleton)/0.5) - (1 + tanh((time - period*floor(time/period) - dusk2_observation_skeleton)/0.5)) + 1 + tanh((time - period*floor(time/period) - period)/0.5));
  light := light_entrainment*H(entrainment_time - time) + light_entrainment_skeleton*H(entrainment_time - time) + light_observation*(1 - H(entrainment_time - time)) + light_observation_skeleton*(1 - H(entrainment_time - time));
  dark := 1 - light;

  // Reactions:
  cG_cZTL_assoc_b: GI_ZTL => GI_prot + ZTL; p13*GI_ZTL*dark;
  cG_cZTL_assoc_f: GI_prot + ZTL => GI_ZTL; p12*light*ZTL*GI_prot/omega;
  cG_degr: GI_prot => ; m19*GI_prot;
  cG_m_degr: GI_mRNA => ; GI_mRNA*m18;
  cG_m_trscr: => GI_mRNA; 1*omega*(q4/omega*light*P + (g14*omega)^n/((g14*omega)^n + TOC1_prot^n)*(g15*omega)^o/((g15*omega)^o + LHY_prot^o)*n12*light);  // modifiers: P, LHY_prot, TOC1_prot
  cG_trsl: => GI_prot; p11*GI_mRNA;  // modifiers: GI_mRNA
  cL_degr: LHY_prot => ; m3*LHY_prot;
  cL_m_degr: LHY_mRNA => ; LHY_mRNA*(m1*light + m2*dark);
  cL_m_trscr: => LHY_mRNA; 1*omega*(g1*omega)^a/((g1*omega)^a + (PRR9_prot + PRR7_prot + PRR5_NI_prot)^a)*(n0*light + q1/omega*light*P + n1*TOC1_prot_modif^b/(TOC1_prot_modif^b + (g2*omega)^b));  // modifiers: P, PRR9_prot, PRR5_NI_prot, PRR7_prot, TOC1_prot_modif
  cL_modif: LHY_prot => LHY_prot_modif; p3*LHY_prot^c/(LHY_prot^c + (g3*omega)^c)*omega;
  cL_trsl: => LHY_prot; (p1*light + p2*dark)*LHY_mRNA;  // modifiers: LHY_mRNA
  cLm_degr: LHY_prot_modif => ; m4*LHY_prot_modif;
  cNI_degr: PRR5_NI_prot => ; (m17*light + m24*dark)*PRR5_NI_prot;
  cNI_m_degr: PRR5_NI_mRNA => ; m16*PRR5_NI_mRNA;
  cNI_m_trscr: => PRR5_NI_mRNA; 1*omega*(n10*LHY_prot_modif^l/((g12*omega)^l + LHY_prot_modif^l) + n11*PRR7_prot^m/((g13*omega)^m + PRR7_prot^m));  // modifiers: PRR7_prot, LHY_prot_modif
  cNI_trsl: => PRR5_NI_prot; p10*PRR5_NI_mRNA;  // modifiers: PRR5_NI_mRNA
  cP7_degr: PRR7_prot => ; PRR7_prot*(m15*light + m23*dark);
  cP7_m_degr: PRR7_mRNA => ; m14*PRR7_mRNA;
  cP7_m_trscr: => PRR7_mRNA; 1*omega*(n8*(LHY_prot + LHY_prot_modif)^j/((g10*omega)^j + (LHY_prot + LHY_prot_modif)^j) + n9*PRR9_prot^k/((g11*omega)^k + PRR9_prot^k));  // modifiers: LHY_prot, TOC1_mRNA, PRR9_prot, LHY_prot_modif
  cP7_trsl: => PRR7_prot; p9*PRR7_mRNA;  // modifiers: PRR7_mRNA
  cP9_degr: PRR9_prot => ; (m13*light + m22*dark)*PRR9_prot;
  cP9_m_degr: PRR9_mRNA => ; m12*PRR9_mRNA;
  cP9_m_trscr: => PRR9_mRNA; 1*omega*(q3/omega*light*P + (g8*omega)^h/((g8*omega)^h + TOC1_prot^h)*(n4 + n7*LHY_prot^i/(LHY_prot^i + (g9*omega)^i)));  // modifiers: P, LHY_prot, TOC1_prot
  cP9_trsl: => PRR9_prot; p8*PRR9_mRNA;  // modifiers: PRR9_mRNA
  cP_degr: P => ; m11*P*light;
  cP_trsl: => P; p7*dark*(1*omega - P);
  cT_degr1: TOC1_prot => ; (m6*light + m7*dark)*TOC1_prot*(p5*ZTL + GI_ZTL)/omega;  // modifiers: GI_ZTL, ZTL
  cT_degr2: TOC1_prot => ; m8*TOC1_prot;
  cT_m_degr: TOC1_mRNA => ; TOC1_mRNA*m5;
  cT_m_trscr: => TOC1_mRNA; 1*omega*(n2*Y_prot^d/(Y_prot^d + (g4*omega)^d) + n3)*((g5*omega)^e/((g5*omega)^e + LHY_prot^e));  // modifiers: LHY_prot, Y_prot
  cT_modif: => TOC1_prot_modif; p15*TOC1_prot^f/(TOC1_prot^f + (g6*omega)^f)*omega;  // modifiers: TOC1_prot
  cT_trsl: => TOC1_prot; p4*TOC1_mRNA;  // modifiers: TOC1_mRNA
  cTm_degr: TOC1_prot_modif => ; (m25*light + m26*dark)*TOC1_prot_modif;
  cY_degr: Y_prot => ; m10*Y_prot;
  cY_m_degr: Y_mRNA => ; Y_mRNA*m9;
  cY_m_trscr: => Y_mRNA; 1*omega*(q2/omega*light*P + (g7*omega)^s/((g7*omega)^s + TOC1_prot^s)*(g16*omega)^g/((g16*omega)^g + LHY_prot^g)*(n5*light + n6*dark));  // modifiers: P, LHY_prot, TOC1_prot
  cY_trsl: => Y_prot; Y_mRNA*p6;  // modifiers: Y_mRNA
  cZG_degr: GI_ZTL => ; m21*GI_ZTL;
  cZTL_degr: ZTL => ; m20*ZTL;
  cZTL_trsl: => ZTL; 1*omega*p14;
end
